*HEADING
cubit(3d-solver/microstrip_line_44000tets_with_abc_20220711.inp): 07/11/2022: 17
version: 2021.11
**
********************************** P A R T S **********************************
*PART, NAME=Part-Default
**
********************************** N O D E S **********************************
*NODE, NSET=ALLNODES
       1,   -4.000000e-03,    8.000000e-04,    2.000000e-02
       2,   -4.000000e-03,    0.000000e+00,    2.000000e-02
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**
********************************** E L E M E N T S ****************************
*ELEMENT, TYPE=C3D4, ELSET=TetrahedronsVacuum
       1,    3957,    3958,    3959,    3960
       2,    3960,    3962,    3961,    3963
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*ELEMENT, TYPE=C3D4, ELSET=TetrahedronsSubstrate
   35712,    1265,    1363,    2218,    2219
   35713,    1332,    2219,    2220,    2221
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*ELEMENT, TYPE=STRI3, ELSET=PECWalls
   43755,     564,     569,     734
   43756,     291,     749,     285
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*ELEMENT, TYPE=STRI3, ELSET=ABC
   45369,    2792,    2807,    2744
   45370,    2797,    2746,    2800
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*ELEMENT, TYPE=STRI3, ELSET=InputPortVacuum
   47903,     287,     313,     298
   47904,     320,     418,     319
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*ELEMENT, TYPE=STRI3, ELSET=InputPortSubstrate
   48246,     282,     369,     319
   48247,     290,     281,     328
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*ELEMENT, TYPE=STRI3, ELSET=OutputPortVacuum
   48394,      15,     138,      14
   48395,     139,     138,      15
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*ELEMENT, TYPE=STRI3, ELSET=OutputPortSubstrate
   48737,       2,      40,      11
   48738,      74,       1,      11
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**
********************************** P R O P E R T I E S ************************
*SOLID SECTION, ELSET=TetrahedronsVacuum, MATERIAL=Default-Steel
*SOLID SECTION, ELSET=TetrahedronsSubstrate, MATERIAL=Default-Steel
*SHELL SECTION, ELSET=PECWalls, SECTION INTEGRATION=SIMPSON, MATERIAL=Default-Steel
1.000000e+00
*SHELL SECTION, ELSET=ABC, SECTION INTEGRATION=SIMPSON, MATERIAL=Default-Steel
1.000000e+00
*SHELL SECTION, ELSET=InputPortVacuum, SECTION INTEGRATION=SIMPSON, MATERIAL=Default-Steel
1.000000e+00
*SHELL SECTION, ELSET=InputPortSubstrate, SECTION INTEGRATION=SIMPSON, MATERIAL=Default-Steel
1.000000e+00
*SHELL SECTION, ELSET=OutputPortVacuum, SECTION INTEGRATION=SIMPSON, MATERIAL=Default-Steel
1.000000e+00
*SHELL SECTION, ELSET=OutputPortSubstrate, SECTION INTEGRATION=SIMPSON, MATERIAL=Default-Steel
1.000000e+00
**
*END PART
**
**
**
********************************** E N D   P A R T S **********************************
**
**
********************************** A S S E M B L Y ************************************
**
*ASSEMBLY, NAME=ASSEMBLY1
**
*INSTANCE, NAME=Part-Default_1, PART=Part-Default
*END INSTANCE
**
*END ASSEMBLY
**
**
**
*MATERIAL, NAME = Default-Steel
*ELASTIC, TYPE=ISOTROPIC
2.068000e+05, 2.900000e-01
*DENSITY
7.000000e-06
*CONDUCTIVITY,TYPE=ISO
4.500000e-02
*SPECIFIC HEAT
5.000000e+02
**
**
************************************** H I S T O R Y *************************************
**
*PREPRINT
**
**************************************** S T E P 1 ***************************************
*STEP,INC=100,NAME=Default Set
**
*STATIC
1, 1, 1e-05, 1
**
**
**
**
*END STEP
