*HEADING
cubit(eguide_12000tets_correct_orientation_rotated_20220705.inp): 07/05/2022: 04
version: 2021.11
**
********************************** P A R T S **********************************
*PART, NAME=Part-Default
**
********************************** N O D E S **********************************
*NODE, NSET=ALLNODES
       1,    1.494812e+00,   -5.147486e-01,    9.357194e-01
       2,    1.318768e+00,   -1.830416e-01,    1.265839e+00
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**
********************************** E L E M E N T S ****************************
*ELEMENT, TYPE=C3D4, ELSET=Tetrahedrons
       1,     824,     825,     826,     827
       2,     827,     829,     828,     830
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*ELEMENT, TYPE=STRI3, ELSET=PECWalls
   11364,       1,      36,     101
   11365,     101,     424,     102
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*ELEMENT, TYPE=STRI3, ELSET=InputPort
   12740,      43,      44,     189
   12741,      42,      43,     190
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*ELEMENT, TYPE=STRI3, ELSET=OutputPort
   12872,      11,     137,      10
   12873,     138,     137,      11
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*ELEMENT, TYPE=B21, ELSET=InPortBoundary
   13006,       5,      37
   13007,      37,      38
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*ELEMENT, TYPE=B21, ELSET=OutPortBoundary
   13038,       1,       9
   13039,       9,      10
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**
********************************** P R O P E R T I E S ************************
*SOLID SECTION, ELSET=Tetrahedrons, MATERIAL=Default-Steel
*SHELL SECTION, ELSET=PECWalls, SECTION INTEGRATION=SIMPSON, MATERIAL=Default-Steel
1.000000e+00
*SHELL SECTION, ELSET=InputPort, SECTION INTEGRATION=SIMPSON, MATERIAL=Default-Steel
1.000000e+00
*SHELL SECTION, ELSET=OutputPort, SECTION INTEGRATION=SIMPSON, MATERIAL=Default-Steel
1.000000e+00
**
*END PART
**
**
**
********************************** E N D   P A R T S **********************************
**
**
********************************** A S S E M B L Y ************************************
**
*ASSEMBLY, NAME=ASSEMBLY1
**
*INSTANCE, NAME=Part-Default_1, PART=Part-Default
*END INSTANCE
**
*END ASSEMBLY
**
**
**
*MATERIAL, NAME = Default-Steel
*ELASTIC, TYPE=ISOTROPIC
2.068000e+05, 2.900000e-01
*DENSITY
7.000000e-06
*CONDUCTIVITY,TYPE=ISO
4.500000e-02
*SPECIFIC HEAT
5.000000e+02
**
**
************************************** H I S T O R Y *************************************
**
*PREPRINT
**
**************************************** S T E P 1 ***************************************
*STEP,INC=100,NAME=Default Set
**
*STATIC
1, 1, 1e-05, 1
**
**
**
**
*END STEP
